OpenVSP model (file version 5), 7 components.
Geometry view with OpenVSP parameter names; values to 6 digits, angles in degrees, lengths in the model's unit.
Overall bounding box: X_Min=0 X_Len=6.05 Y_Min=-5 Y_Len=10 Z_Min=-0.494691 Z_Len=2.39469

Fuselage "Fuselage"
  location (X Y Z) 0 0 0, rotation 0 0 0
  bounding box size 6.05 0.9 1.04469
  Design: Length=6
  cross sections:
    n  XLocPercent  YLocPercent  ZLocPercent  shape
    0  0            0            -0.0166667   circle Circle_Diameter=0
    1  0.25         0            0.0166667    circle Circle_Diameter=0.9
    2  0.5          0            0            circle Circle_Diameter=0.75
    3  0.662635     0            0            as above
    4  0.811717     0            0            as above
    5  1            0            0.0333333    circle Circle_Diameter=0.4
    6  1            0            0.0333333    circle Circle_Diameter=0

Wing "Horizontal Tail"
  location (X Y Z) 5.2 0 0.4, rotation 0 0 0
  symmetric about XZ
  bounding box size 0.6 3 0.0600348
  totals: TotalSpan=3 TotalProjectedSpan=3 TotalChord=0.4 TotalArea=1.2 TotalAR=7.5
  root: chord 0.6, twist 0, NACA 4-series Camber=0 CamberLoc=0.2 ThickChord=0.1
  sections:
    n  Span  Root_Chord  Tip_Chord  Area  Sweep  Sweep_Location  Dihedral  Twist  Twist_Location  tip airfoil
    1  1.5   0.6         0.2        0.6   0      0.9             0         0      0.25            as above

Wing "Fuel Tank"
  location (X Y Z) 3.2 0 0.15, rotation 0 0 0
  symmetric about XZ
  bounding box size 0.360113 9 0.0510916
  totals: TotalSpan=9 TotalProjectedSpan=9 TotalChord=0.324 TotalArea=2.916 TotalAR=27.7778
  root: chord 0.36, twist 0, NACA 4-series Camber=0.044 CamberLoc=0.44 ThickChord=0.12
  sections:
    n  Span  Root_Chord  Tip_Chord  Area   Sweep  Sweep_Location  Dihedral  Twist  Twist_Location  tip airfoil
    1  4.5   0.36        0.288      1.458  0      0.25            0         0      0.25            NACA 4-series Camber=0 CamberLoc=0.2 ThickChord=0.1

Wing "Wing"
  location (X Y Z) 3 0 0.1, rotation 0 0 0
  symmetric about XZ
  bounding box size 1.00067 10 0.139239
  totals: TotalSpan=10 TotalProjectedSpan=10 TotalChord=0.9 TotalArea=9 TotalAR=11.1111
  root: chord 1, twist 0, NACA 4-series Camber=0.06 CamberLoc=0.4 ThickChord=0.12
  sections:
    n  Span  Root_Chord  Tip_Chord  Area  Sweep  Sweep_Location  Dihedral  Twist  Twist_Location  tip airfoil
    1  5     1           0.8        4.5   0      0.25            0         0      0.25            as above

Custom "Motor"
  location (X Y Z) 4.4 0 0.02, rotation 0 0 0
  bounding box size 0.653 0.596 0.378
  Design: Height=0.378 Length=0.653 SquareFlag=0 Width=0.596
  custom script Box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

Wing "Vertical Tail"
  location (X Y Z) 5.2 0 0.4, rotation 90 0 0
  bounding box size 0.6 0.0600348 1.5
  totals: TotalSpan=1.5 TotalProjectedSpan=1.5 TotalChord=0.4 TotalArea=0.6 TotalAR=3.75
  root: chord 0.6, twist 0, NACA 4-series Camber=0 CamberLoc=0.2 ThickChord=0.1
  sections:
    n  Span  Root_Chord  Tip_Chord  Area  Sweep  Sweep_Location  Dihedral  Twist  Twist_Location  tip airfoil
    1  1.5   0.6         0.2        0.6   0      0.9             0         0      0.25            as above

Stack "Payload"
  location (X Y Z) 1 0 0, rotation 0 0 0
  bounding box size 1.05 0.4 0.4
  cross sections:
    n  XDelta  YDelta  ZDelta  shape
    0  0       0       0       point
    1  0.25    0       0       ellipse Ellipse_Height=0.4 Ellipse_Width=0.4
    2  0.25    0       0       as above
    3  0.3     0       0       as above
    4  0.25    0       0       point
